table  # each column defines a variable
    x11 | y11
    -8.1/4 | 1*0.361
    -6.9/4 | 2*0.361
    -5.6/4 | 3*0.361
    -4.1/4 | 4*0.361
    -2/4 | 5*0.361
    -1/4 | 4*0.361
    1/4 | 19*0.361
    1.4/4 | 18*0.361
    1.9/4 | 17*0.361
    2.6/4 | 16*0.361
    4/4 | 15*0.361
    7.1/4 | 14*0.361
    □ | □
end table
X1 := 0.125
table  # each column defines a variable
    x21 | y21
    -7.8/4 | 2*0.361
    -6.7/4 | 3*0.361
    -5.6/4 | 4*0.361
    -4.4/4 | 5*0.361
    -3.3/4 | 6*0.361
    -2.3/4 | 7*0.361
    -1.1/4 | 8*0.361
    2.5/4 | 9*0.361
    6.5/4 | 8*0.361
    □ | □
end table
X2 := -0.125
S21 := cspline(x21, y21)
S11 := cspline(x11, y11)
C21(t21) := interp(S21, x21, y21, t21)
C11(t11) := interp(S11, x11, y11, t11)
t21 := x21[0], x21[0] + 0.01 .. x21[rows(x21) - 1]
t11 := x11[0], x11[0] + 0.01 .. x11[rows(x11) - 1]
t1121 := x11[0], x11[0] + 0.01 .. x21[rows(x21) - 1]
# [plot: C11(t11), C21(t21), C11(t1121) - C21(t1121), y11, y21 vs t11, t21, t1121, x11, x21]
# [plot: d/dt1121(C11(t1121) - C21(t1121)) vs t1121, X1, X2]
table  # each column defines a variable
    x22 | y22
    -8.1/4 | 2*0.361
    -6.8/4 | 3*0.361
    -5.7/4 | 4*0.361
    -4.6/4 | 5*0.361
    -3.4/4 | 6*0.361
    -2.4/4 | 7*0.361
    -1/4 | 8*0.361
    2/4 | 9*0.361
    7.5/4 | 8*0.361
end table
S22 := cspline(x22, y22)
C22(t22) := interp(S22, x22, y22, t22)
t22 := x22[0], x22[0] + 0.01 .. x22[rows(x22) - 1]
table  # each column defines a variable
    x12 | y12
    -8.4/4 | 1*0.361
    -7.2/4 | 2*0.361
    -5.9/4 | 3*0.361
    -4.8/4 | 4*0.361
    -3.5/4 | 5*0.361
    1.2/4 | 17*0.361
    1.9/4 | 16*0.361
    3.2/4 | 15*0.361
    6.5/4 | 14*0.361
end table
S12 := cspline(x12, y12)
t1222 := x12[0], x12[0] + 0.01 .. x22[rows(x22) - 1]
C12(t12) := interp(S12, x12, y12, t12)
# [plot: d/dt1222(C12(t1222) - C22(t1222)) vs t1222, X1, X2]
t12 := x12[0], x12[0] + 0.01 .. x12[rows(x12) - 1]
# [plot: C12(t12), C22(t22), C12(t1222) - C22(t1222), y12, y22 vs t12, t22, t1222, x12, x22]
table  # each column defines a variable
    x13 | y13
    -8.5/4 | 1*0.361
    -7.3/4 | 2*0.361
    -6.2/4 | 3*0.361
    -5.2/4 | 4*0.361
    -4.2/4 | 5*0.361
    -3.1/4 | 6*0.361
    -2/4 | 7*0.361
    -1.1/4 | 8*0.361
    0.3/4 | 11*0.361
    0.5/4 | 12*0.361
    0.7/4 | 13*0.361
    1/4 | 14*0.361
    6/4 | 14*0.361
end table
S13 := cspline(x13, y13)
table  # each column defines a variable
    x23 | y23
    -8.4/4 | 2*0.361
    -7/4 | 3*0.361
    -5.9/4 | 4*0.361
    -4.6/4 | 5*0.361
    -3.4/4 | 6*0.361
    -2.3/4 | 7*0.361
    -0.6/4 | 8*0.361
    2.4/4 | 9*0.361
    8/4 | 8*0.361
end table
C13(t13) := interp(S13, x13, y13, t13)
t1323 := x13[0], x13[0] + 0.01 .. x23[rows(x23) - 1]
S23 := cspline(x23, y23)
t13 := x13[0], x13[0] + 0.01 .. x13[rows(x13) - 1]
C23(t23) := interp(S23, x23, y23, t23)
t23 := x23[0], x23[0] + 0.01 .. x23[rows(x23) - 1]
# [plot: C13(t13), C23(t23), C13(t1323) - C23(t1323), y13, y23 vs t13, t23, t1323, x13, x23]
# [plot: d/dt1323(C13(t1323) - C23(t1323)) vs t1323, X1, X2]
table  # each column defines a variable
    x24 | y24
    -8.1/4 | 2*0.361
    -6.9/4 | 3*0.361
    -5.7/4 | 4*0.361
    -4.4/4 | 5*0.361
    -3.1/4 | 6*0.361
    -2.3/4 | 7*0.361
    1/4 | 8*0.361
    □ | □
    □ | □
end table
S24 := cspline(x24, y24)
table  # each column defines a variable
    x14 | y14
    -8.6/4 | 1*0.361
    -7.5/4 | 2*0.361
    -6.5/4 | 3*0.361
    -5.6/4 | 4*0.361
    -4.7/4 | 5*0.361
    -4/4 | 6*0.361
    -3.2/4 | 7*0.361
    -2.5/4 | 8*0.361
    -1.9/4 | 9*0.361
    -1.5/4 | 10*0.361
    -0.9/4 | 11*0.361
    0.6/4 | 8*0.361
    0.7/4 | 9*0.361
    1/4 | 10*0.361
    1.4/4 | 11*0.361
    1.9/4 | 12*0.361
    3/4 | 13*0.361
end table
S14 := cspline(x14, y14)
C24(t24) := interp(S24, x24, y24, t24)
C14(t14) := interp(S14, x14, y14, t14)
t24 := x24[0], x24[0] + 0.01 .. x24[rows(x24) - 1]
t14 := x14[0], x14[0] + 0.01 .. x14[rows(x14) - 1]
t1424 := x14[0], x14[0] + 0.01 .. x24[rows(x24) - 1]
# [plot: C14(t14), C24(t24), C14(t1424) - C24(t1424), y14, y24 vs t14, t24, t1424, x14, x24]
# [plot: d/dt1424(C14(t1424) - C24(t1424)) vs t1424, X1, X2]
VS := linterp
table  # each column defines a variable
    x25 | y25
    -8.3/4 | 2*0.361
    -7/4 | 3*0.361
    -5.9/4 | 4*0.361
    -4.5/4 | 5*0.361
    -3.2/4 | 6*0.361
    3.5/4 | 9*0.361
    6.9/4 | 8*0.361
end table
table  # each column defines a variable
    x15 | y15
    -8.8/4 | 1*0.361
    -7.7/4 | 2*0.361
    -6.7/4 | 3*0.361
    -5.8/4 | 4*0.361
    -5/4 | 5*0.361
    -4.2/4 | 6*0.361
    -3.5/4 | 7*0.361
    -3/4 | 8*0.361
    -2.2/4 | 9*0.361
    -1.7/4 | 10*0.361
    -1.3/4 | 11*0.361
    0.6/4 | 8*0.361
    0.8/4 | 9*0.361
    1.3/4 | 10*0.361
    1.6/4 | 11*0.361
    2.4/4 | 12*0.361
    4.2/4 | 13*0.361
end table
S25 := cspline(x25, y25)
S15 := cspline(x15, y15)
C25(t25) := interp(S25, x25, y25, t25)
C15(t15) := interp(S15, x15, y15, t15)
t25 := x25[0], x25[0] + 0.01 .. x25[rows(x25) - 1]
t15 := x15[0], x15[0] + 0.01 .. x15[rows(x15) - 1]
t1525 := x15[0], x15[0] + 0.01 .. x25[rows(x25) - 1]
# [plot: d/dt1525(C15(t1525) - C25(t1525)) vs t1525, X1, X2]
# [plot: C15(t15), C25(t25), C15(t1525) - C25(t1525), y15, y25 vs t15, t25, t1525, x15, x25]
table  # each column defines a variable
    x26 | y26
    -8.2/4 | 2*0.361
    -7.1/4 | 3*0.361
    -5.9/4 | 4*0.361
    -4.6/4 | 5*0.361
    -3.3/4 | 6*0.361
    -2.5/4 | 7*0.361
    -0.8/4 | 8*0.361
    4/4 | 9*0.361
    □ | □
end table
S26 := cspline(x26, y26)
table  # each column defines a variable
    x16 | y16
    -8.3/4 | 2*0.361
    -7.3/4 | 3*0.361
    -6.4/4 | 4*0.361
    -5/4 | 5*0.361
    -4.6/4 | 6*0.361
    -3.8/4 | 7*0.361
    -3/4 | 8*0.361
    -2.4/4 | 9*0.361
    -1.8/4 | 10*0.361
    -1.1/4 | 11*0.361
    0.6/4 | 10*0.361
    1.8/4 | 11*0.361
    2.3/4 | 12*0.361
    4.6/4 | 13*0.361
end table
S16 := cspline(x16, y16)
C16(t16) := interp(S16, x16, y16, t16)
C26(t26) := interp(S26, x26, y26, t26)
t1626 := x16[0], x16[0] + 0.01 .. x26[rows(x26) - 1]
t26 := x26[0], x26[0] + 0.01 .. x26[rows(x26) - 1]
t16 := x16[0], x16[0] + 0.01 .. x16[rows(x16) - 1]
# [plot: C16(t16), C26(t26), C16(t1626) - C26(t1626), y16, y26 vs t16, t26, t1626, x16, x26]
# [plot: d/dt1626(C16(t1626) - C26(t1626)) vs t1626, X1, X2]
table  # each column defines a variable
    x17 | y17
    -8.6/4 | 2*0.361
    -7.6/4 | 3*0.361
    -6.7/4 | 4*0.361
    -5.9/4 | 5*0.361
    -5/4 | 6*0.361
    -4.2/4 | 7*0.361
    -3.4/4 | 8*0.361
    -2.5/4 | 9*0.361
    -1.6/4 | 10*0.361
    -0.7/4 | 11*0.361
    0.6/4 | 10*0.361
    1.5/4 | 11*0.361
    3.2/4 | 12*0.361
    6/4 | 13*0.361
end table
S17 := cspline(x17, y17)
table  # each column defines a variable
    x27 | y27
    -8.8/4 | 2*0.361
    -7.5/4 | 3*0.361
    -6.3/4 | 4*0.361
    -5/4 | 5*0.361
    -3.7/4 | 6*0.361
    -2/4 | 7*0.361
    -1.2/4 | 8*0.361
    2/4 | 9*0.361
    6.3/4 | 9*0.361
end table
C17(t17) := interp(S17, x17, y17, t17)
S27 := cspline(x27, y27)
t17 := x17[0], x17[0] + 0.01 .. x17[rows(x17) - 1]
C27(t27) := interp(S27, x27, y27, t27)
t27 := x27[0], x27[0] + 0.01 .. x27[rows(x27) - 1]
t1727 := x17[0], x17[0] + 0.01 .. x27[rows(x27) - 1]
# [plot: C17(t17), C27(t27), C17(t1727) - C27(t1727), y17, y27 vs t17, t27, t1727, x17, x27]
# [plot: d/dt1727(C17(t1727) - C27(t1727)) vs t1727, X1, X2]
table  # each column defines a variable
    x18 | y18
    -8.7/4 | 2*0.361
    -7.8/4 | 3*0.361
    -6.9/4 | 4*0.361
    -6.1/4 | 5*0.361
    -5.2/4 | 6*0.361
    -4.4/4 | 7*0.361
    -3.5/4 | 8*0.361
    -2.6/4 | 9*0.361
    -1.7/4 | 10*0.361
    -0.9/4 | 11*0.361
    0.7/4 | 10*0.361
    1.5/4 | 11*0.361
    3.1/4 | 12*0.361
    6.5/4 | 13*0.361
end table
table  # each column defines a variable
    x28 | y28
    -8.9/4 | 2*0.361
    -8.2/4 | 3*0.361
    -7.1/4 | 4*0.361
    -6/4 | 5*0.361
    -4.5/4 | 6*0.361
    -3/4 | 7*0.361
    -1.5/4 | 8*0.361
    2/4 | 9*0.361
    7.5/4 | 9*0.361
end table
S18 := cspline(x18, y18)
S28 := cspline(x28, y28)
C18(t18) := interp(S18, x18, y18, t18)
C28(t28) := interp(S28, x28, y28, t28)
t18 := x18[0], x18[0] + 0.01 .. x18[rows(x18) - 1]
t28 := x28[0], x28[0] + 0.01 .. x28[rows(x28) - 1]
t1828 := x18[0], x18[0] + 0.01 .. x28[rows(x28) - 1]
# [plot: C18(t18), C28(t28), C18(t1828) - C28(t1828), y18, y28 vs t18, t28, t1828, x18, x28, X1, X2]
# [plot: d/dt1828(C18(t1828) - C28(t1828)) vs t1828, X1, X2]
table  # each column defines a variable
    x19 | y19
    -8.9/4 | 2*0.361
    -8.1/4 | 3*0.361
    -7.1/4 | 4*0.361
    -6.3/4 | 5*0.361
    -5.3/4 | 6*0.361
    -4.5/4 | 7*0.361
    -3.6/4 | 8*0.361
    -2.6/4 | 9*0.361
    -1.7/4 | 10*0.361
    -0.7/4 | 11*0.361
    0.4/4 | 10*0.361
    1.3/4 | 11*0.361
    3/4 | 12*0.361
    6.5/4 | 13*0.361
end table
table  # each column defines a variable
    x29 | y29
    -9/4 | 2*0.361
    -8.5/4 | 3*0.361
    -7.2/4 | 4*0.361
    -6/4 | 5*0.361
    -4.6/4 | 6*0.361
    -3.1/4 | 7*0.361
    -1.2/4 | 8*0.361
    1.5/4 | 9*0.361
    8/4 | 9*0.361
end table
S19 := cspline(x19, y19)
S29 := cspline(x29, y29)
C19(t19) := interp(S19, x19, y19, t19)
C29(t29) := interp(S29, x29, y29, t29)
t19 := x19[0], x19[0] + 0.01 .. x19[rows(x19) - 1]
t29 := x29[0], x29[0] + 0.01 .. x29[rows(x29) - 1]
t1929 := x19[0], x19[0] + 0.01 .. x29[rows(x29) - 1]
# [plot: C19(t19), C29(t29), C19(t1929) - C29(t1929), y19, y29 vs t19, t29, t1929, x19, x29]
# [plot: d/dt1929(C19(t1929) - C29(t1929)) vs t1929, X1, X2]
table  # each column defines a variable
    x1 | y1
    9.744 | 2.5
    1.316 | 3.75
    6.807 | 5
    11.424 | 6.25
    4.189 | 7.5
    -0.527 | 8.75
    -0.554 | 10
    -0.757 | 12.5
    0.009 | 15
end table
table  # each column defines a variable
    x2 | y2
    12.818 | 2.5
    3.617 | 4
    1.399 | 5
    -8.846 | 7.5
    -6.339 | 8.5
    -1.161 | 10
    -1.7 | 12.5
    -1.873 | 15
    □ | □
end table
S1 := cspline(y1, x1)
S2 := cspline(y2, x2)
C1(t1) := interp(S1, y1, x1, t1)
C2(t2) := interp(S2, y2, x2, t2)
t1 := y1[0], y1[0] + 0.01 .. y1[rows(y1) - 1]
t2 := y2[0], y2[0] + 0.01 .. y2[rows(y2) - 1]
# [plot: C1(t1), x1 vs t1, y1]
# [plot: C2(t2), x2 vs t2, y2]
